<?xml version="1.0" encoding="utf-8"?>
<Lems xmlns="http://www.neuroml.org/lems/0.7.6"
      xmlns:xsi="http://www.w3.org/2001/XMLSchema-instance"
      xsi:schemaLocation="http://www.neuroml.org/lems/0.7.6 ../../LEMS/Schemas/LEMS/LEMS_v0.7.6.xsd"
      description="Test Scoping rules">

  <Include file="Simulation.xml"/>

  <ComponentType name="base">

    <Parameter name="p_base" dimension="none"/>
    <Exposure name="d_p_base" dimension="none"/>
    <Exposure name="sv_base" dimension="none"/>

    <Child name="in0" type="inner"/>

    <Dynamics>
      <!-- Setting derived vars from literals -->
      <DerivedVariable name="d_base" value="42"/>
      <!-- Setting derived vars from parameters -->
      <DerivedVariable name="d_p_base" value="1" exposure="d_p_base"/>
      <!-- TODO Setting derived vars from child parameters -->
      <!-- Fun fact: using pylems and 'in' implodes, since using `x.in` is a syntax error -->
      <DerivedVariable name="d_p_in" select="in0/dd_inner" dimension="none"/>

      <StateVariable name="sv_base" dimension="none" exposure="sv_base"/>
    </Dynamics>

  </ComponentType>

  <ComponentType name="inner">

    <Requirement name="d_p_base" dimension="none"/> <!-- This needs to be exposed on parent-->
    <Exposure name="dd_inner" dimension="none"/>

    <Dynamics>
      <!-- Setting derived vars from literals -->
      <DerivedVariable name="d_inner" value="42"/>
      <!-- Setting derived vars from others-->
      <DerivedVariable name="dd_inner" value="2*d_inner" exposure="dd_inner"/>

      <DerivedVariable name="d_p_base_inner" value="d_p_base"/> <!-- Taking this value from the parent-->
    </Dynamics>
  </ComponentType>

  <!-- We need this in order to get _something_ out of (j|py)lems -->
  <Target component="SimTest"/>

  <base id="my0" p_base="23">
    <in0 id="myin0" type="inner"/>
  </base>

   <Simulation id="SimTest" length="2s" step="1s" target="my0">

       <OutputFile id="test" fileName="test.dat">
           <OutputColumn id="0" quantity="d_base"/>
           <OutputColumn id="1" quantity="d_p_base"/>
           <OutputColumn id="2" quantity="d_p_in"/>
           <OutputColumn id="3" quantity="sv_base"/>
           <OutputColumn id="4" quantity="myin0/d_inner"/>
           <OutputColumn id="5" quantity="myin0/dd_inner"/>
           <OutputColumn id="6" quantity="myin0/d_p_base_inner"/>
       </OutputFile>

   </Simulation>

</Lems>
